*Heading
** Job name: Job-2 Model name: Model-2
** Generated by: Abaqus/CAE 2021
*Preprint, echo=NO, model=NO, history=NO, contact=NO
**
** PARTS
**
*Part, name=Part-1
*Node
      1,        46.25,         82.5,           0.
      2,        41.25,         82.5,           0.
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*Element, type=S4R
   1,    1,    2,  109,  108
   2,    2,    3,  110,  109
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*Nset, nset=_PickedSet2, internal, generate
    1,  2247,     1
*Elset, elset=_PickedSet2, internal, generate
    1,  2120,     1
** Section: Section-2
*Shell Section, elset=_PickedSet2, material=Material-1
2., 5
*End Part
**
*Part, name=Part-2
*Node
      1,        -351.,         -20.,          30.
      2,        -351.,         -15.,          30.
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*Element, type=C3D8R
   1,   148,   149,   170,   169,     1,     2,    23,    22
   2,   149,   150,   171,   170,     2,     3,    24,    23
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*Nset, nset=_PickedSet2, internal, generate
     1,  11760,      1
*Elset, elset=_PickedSet2, internal, generate
    1,  9480,     1
** Section: Section-1
*Solid Section, elset=_PickedSet2, material=Material-1
,
*End Part
**
**
** ASSEMBLY
**
*Assembly, name=Assembly
**
*Instance, name=Part-1-1, part=Part-1
       -199.,        -32.5,       483.75
       -199.,        -32.5,       483.75,        -199., -33.5000000126881,       483.75, 89.9999992730282
*End Instance
**
*Instance, name=Part-2-1, part=Part-2
        153.,         -30.,         500.
*End Instance
**
*Instance, name=Part-1-2, part=Part-1
        199.,        -32.5,        46.25
        199.,        -32.5,        46.25,         199., -31.4999999873119,        46.25, 89.9999992730282
*End Instance
**
*Node
      1,        -199.,           0.,           0.
*Node
      2,         199.,           0.,           0.
*Node
      3,           0.,           0.,         530.
*Nset, nset=Set-1
 1,
*Nset, nset=Set-2
 2,
*Nset, nset=Set-3
 3,
*Nset, nset=_PickedSet12, internal
 1,
*Nset, nset=_PickedSet14, internal
 2,
*Nset, nset=_PickedSet16, internal
 3,
*Nset, nset=_PickedSet21, internal
 1, 2
*Nset, nset=_PickedSet22, internal
 3,
*Elset, elset=__PickedSurf11_E2, internal, instance=Part-1-1, generate
  106,  2120,   106
*Surface, type=ELEMENT, name=_PickedSurf11, internal
__PickedSurf11_E2, E2
*Elset, elset=__PickedSurf13_E4, internal, instance=Part-1-2, generate
    1,  2015,   106
*Surface, type=ELEMENT, name=_PickedSurf13, internal
__PickedSurf13_E4, E4
*Elset, elset=__PickedSurf15_S3, internal, instance=Part-2-1
    1,    2,    3,    4,    5,    6
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*Surface, type=ELEMENT, name=_PickedSurf15, internal
__PickedSurf15_S3, S3
*Elset, elset=__PickedSurf17_S2, internal, instance=Part-2-1, generate
   1,  120,    1
*Surface, type=ELEMENT, name=_PickedSurf17, internal
__PickedSurf17_S2, S2
*Elset, elset=__PickedSurf18_SNEG, internal, instance=Part-1-1, generate
    1,  2120,     1
*Surface, type=ELEMENT, name=_PickedSurf18, internal
__PickedSurf18_SNEG, SNEG
*Elset, elset=__PickedSurf19_S1, internal, instance=Part-2-1, generate
 9361,  9480,     1
*Surface, type=ELEMENT, name=_PickedSurf19, internal
__PickedSurf19_S1, S1
*Elset, elset=__PickedSurf20_SNEG, internal, instance=Part-1-2, generate
    1,  2120,     1
*Surface, type=ELEMENT, name=_PickedSurf20, internal
__PickedSurf20_SNEG, SNEG
** Constraint: Constraint-1
*Coupling, constraint name=Constraint-1, ref node=_PickedSet12, surface=_PickedSurf11
*Kinematic
** Constraint: Constraint-2
*Coupling, constraint name=Constraint-2, ref node=_PickedSet14, surface=_PickedSurf13
*Kinematic
** Constraint: Constraint-3
*Coupling, constraint name=Constraint-3, ref node=_PickedSet16, surface=_PickedSurf15
*Kinematic
** Constraint: Constraint-4
*Tie, name=Constraint-4, adjust=yes
_PickedSurf18, _PickedSurf17
** Constraint: Constraint-5
*Tie, name=Constraint-5, adjust=yes
_PickedSurf20, _PickedSurf19
*End Assembly
**
** MATERIALS
**
*Material, name=Material-1
*Elastic
206000., 0.3
*Plastic
235.,0.
** ----------------------------------------------------------------
**
** STEP: Step-1
**
*Step, name=Step-1, nlgeom=NO
*Static
0.001, 1., 1e-05, 1.
**
** BOUNDARY CONDITIONS
**
** Name: BC-1 Type: Displacement/Rotation
*Boundary
_PickedSet21, 1, 1
_PickedSet21, 2, 2
_PickedSet21, 3, 3
_PickedSet21, 4, 4
_PickedSet21, 5, 5
_PickedSet21, 6, 6
** Name: BC-2 Type: Displacement/Rotation
*Boundary
_PickedSet22, 1, 1, 1.
**
** OUTPUT REQUESTS
**
*Restart, write, frequency=0
**
** FIELD OUTPUT: F-Output-1
**
*Output, field, variable=PRESELECT
**
** HISTORY OUTPUT: H-Output-1
**
*Output, history, variable=PRESELECT
*End Step
